! Original load models relocated and rebased in per unit
new Load.s1a Bus1="1.1" Phases=1 Conn="wye" Model=1 kV=2.4 kW=40 kvar=20
new Load.s2b Bus1="1.2" Phases=1 Conn="wye" Model=1 kV=2.4 kW=20 kvar=10
new Load.s4c Bus1="1.3" Phases=1 Conn="wye" Model=1 kV=2.4 kW=40 kvar=20
new Load.s5c Bus1="1.3" Phases=1 Conn="wye" Model=5 kV=2.4 kW=20 kvar=10
new Load.s6c Bus1="1.3" Phases=1 Conn="wye" Model=2 kV=2.4 kW=40 kvar=20
new Load.s7a Bus1="7.1" Phases=1 Conn="wye" Model=1 kV=2.4 kW=20 kvar=10
new Load.s9a Bus1="9.1" Phases=1 Conn="wye" Model=1 kV=2.4 kW=40 kvar=20
new Load.s10a Bus1="9r.1" Phases=1 Conn="wye" Model=5 kV=2.4 kW=20 kvar=10
new Load.s11a Bus1="9r.1" Phases=1 Conn="wye" Model=2 kV=2.4 kW=40 kvar=20
new Load.s12b Bus1="8.2" Phases=1 Conn="wye" Model=1 kV=2.4 kW=20 kvar=10
new Load.s16c Bus1="13.3" Phases=1 Conn="wye" Model=1 kV=2.4 kW=40 kvar=20
new Load.s17c Bus1="13.3" Phases=1 Conn="wye" Model=1 kV=2.4 kW=20 kvar=10
new Load.s19a Bus1="18.1" Phases=1 Conn="wye" Model=1 kV=2.4 kW=40 kvar=20
new Load.s20a Bus1="18.1" Phases=1 Conn="wye" Model=5 kV=2.4 kW=40 kvar=20
new Load.s22b Bus1="18.2" Phases=1 Conn="wye" Model=2 kV=2.4 kW=40 kvar=20
new Load.s24c Bus1="18.3" Phases=1 Conn="wye" Model=1 kV=2.4 kW=40 kvar=20
new Load.s28a Bus1="25.1" Phases=1 Conn="wye" Model=5 kV=2.4 kW=40 kvar=20
new Load.s29a Bus1="25.1" Phases=1 Conn="wye" Model=2 kV=2.4 kW=40 kvar=20
new Load.s30c Bus1="25.3" Phases=1 Conn="wye" Model=1 kV=2.4 kW=40 kvar=20
new Load.s31c Bus1="25r.3" Phases=1 Conn="wye" Model=1 kV=2.4 kW=20 kvar=10
new Load.s32c Bus1="25r.3" Phases=1 Conn="wye" Model=1 kV=2.4 kW=20 kvar=10
new Load.s33a Bus1="25r.1" Phases=1 Conn="wye" Model=5 kV=2.4 kW=40 kvar=20
new Load.s34c Bus1="13.3" Phases=1 Conn="wye" Model=2 kV=2.4 kW=40 kvar=20
new Load.s35a Bus1="135.1.2" Phases=1 Conn="delta" Model=1 kV=4.16 kW=40 kvar=20
new Load.s37a Bus1="135.1" Phases=1 Conn="wye" Model=2 kV=2.4 kW=40 kvar=20
new Load.s38b Bus1="135.2" Phases=1 Conn="wye" Model=5 kV=2.4 kW=20 kvar=10
new Load.s39b Bus1="135.2" Phases=1 Conn="wye" Model=1 kV=2.4 kW=20 kvar=10
new Load.s41c Bus1="40.3" Phases=1 Conn="wye" Model=1 kV=2.4 kW=20 kvar=10
new Load.s42a Bus1="40.1" Phases=1 Conn="wye" Model=1 kV=2.4 kW=20 kvar=10
new Load.s43b Bus1="40.2" Phases=1 Conn="wye" Model=2 kV=2.4 kW=40 kvar=20
new Load.s45a Bus1="40.1" Phases=1 Conn="wye" Model=5 kV=2.4 kW=20 kvar=10
new Load.s46a Bus1="40.1" Phases=1 Conn="wye" Model=1 kV=2.4 kW=20 kvar=10
new Load.s47 Bus1="40" Phases=3 Conn="wye" Model=5 kV=4.16 kW=105 kvar=75
new Load.s48 Bus1="40" Phases=3 Conn="wye" Model=2 kV=4.16 kW=210 kvar=150
new Load.s49a Bus1="40.1" Phases=1 Conn="wye" Model=1 kV=2.4 kW=35 kvar=25
new Load.s49b Bus1="40.2" Phases=1 Conn="wye" Model=1 kV=2.4 kW=70 kvar=50
new Load.s49c Bus1="40.3" Phases=1 Conn="wye" Model=1 kV=2.4 kW=35 kvar=20
new Load.s50c Bus1="40.3" Phases=1 Conn="wye" Model=1 kV=2.4 kW=40 kvar=20
new Load.s51a Bus1="40.1" Phases=1 Conn="wye" Model=1 kV=2.4 kW=20 kvar=10
new Load.s52a Bus1="52.1" Phases=1 Conn="wye" Model=1 kV=2.4 kW=40 kvar=20
new Load.s53a Bus1="52.1" Phases=1 Conn="wye" Model=1 kV=2.4 kW=40 kvar=20
new Load.s55a Bus1="52.1" Phases=1 Conn="wye" Model=2 kV=2.4 kW=20 kvar=10
new Load.s56b Bus1="52.2" Phases=1 Conn="wye" Model=1 kV=2.4 kW=20 kvar=10
new Load.s58b Bus1="57.2" Phases=1 Conn="wye" Model=5 kV=2.4 kW=20 kvar=10
new Load.s59b Bus1="57.2" Phases=1 Conn="wye" Model=1 kV=2.4 kW=20 kvar=10
new Load.s60a Bus1="60.1" Phases=1 Conn="wye" Model=1 kV=2.4 kW=20 kvar=10
new Load.s62c Bus1="60.3" Phases=1 Conn="wye" Model=2 kV=2.4 kW=40 kvar=20
new Load.s63a Bus1="60.1" Phases=1 Conn="wye" Model=1 kV=2.4 kW=40 kvar=20
new Load.s64b Bus1="64.2" Phases=1 Conn="wye" Model=5 kV=2.4 kW=75 kvar=35
new Load.s65a Bus1="64.1.2" Phases=1 Conn="delta" Model=2 kV=4.16 kW=35 kvar=25
new Load.s65b Bus1="64.2.3" Phases=1 Conn="delta" Model=2 kV=4.16 kW=35 kvar=25
new Load.s65c Bus1="64.3.1" Phases=1 Conn="delta" Model=2 kV=4.16 kW=70 kvar=50
new Load.s66c Bus1="64.3" Phases=1 Conn="wye" Model=1 kV=2.4 kW=75 kvar=35
new Load.s68a Bus1="67.1" Phases=1 Conn="wye" Model=1 kV=2.4 kW=20 kvar=10
new Load.s69a Bus1="67.1" Phases=1 Conn="wye" Model=1 kV=2.4 kW=40 kvar=20
new Load.s70a Bus1="67.1" Phases=1 Conn="wye" Model=1 kV=2.4 kW=20 kvar=10
new Load.s71a Bus1="67.1" Phases=1 Conn="wye" Model=1 kV=2.4 kW=40 kvar=20
new Load.s73c Bus1="67.3" Phases=1 Conn="wye" Model=1 kV=2.4 kW=40 kvar=20
new Load.s74c Bus1="67.3" Phases=1 Conn="wye" Model=2 kV=2.4 kW=40 kvar=20
new Load.s75c Bus1="67.3" Phases=1 Conn="wye" Model=1 kV=2.4 kW=40 kvar=20
new Load.s76a Bus1="67.1.2" Phases=1 Conn="delta" Model=5 kV=4.16 kW=105 kvar=80
new Load.s76b Bus1="67.2.3" Phases=1 Conn="delta" Model=5 kV=4.16 kW=70 kvar=50
new Load.s76c Bus1="67.3.1" Phases=1 Conn="delta" Model=5 kV=4.16 kW=70 kvar=50
new Load.s77b Bus1="67.2" Phases=1 Conn="wye" Model=1 kV=2.4 kW=40 kvar=20
new Load.s79a Bus1="67.1" Phases=1 Conn="wye" Model=2 kV=2.4 kW=40 kvar=20
new Load.s80b Bus1="80.2" Phases=1 Conn="wye" Model=1 kV=2.4 kW=40 kvar=20
new Load.s82a Bus1="80.1" Phases=1 Conn="wye" Model=1 kV=2.4 kW=40 kvar=20
new Load.s83c Bus1="80.3" Phases=1 Conn="wye" Model=1 kV=2.4 kW=20 kvar=10
new Load.s84c Bus1="80.3" Phases=1 Conn="wye" Model=1 kV=2.4 kW=20 kvar=10
new Load.s85c Bus1="80.3" Phases=1 Conn="wye" Model=1 kV=2.4 kW=40 kvar=20
new Load.s86b Bus1="67.2" Phases=1 Conn="wye" Model=1 kV=2.4 kW=20 kvar=10
new Load.s87b Bus1="67.2" Phases=1 Conn="wye" Model=1 kV=2.4 kW=40 kvar=20
new Load.s88a Bus1="67.1" Phases=1 Conn="wye" Model=1 kV=2.4 kW=40 kvar=20
new Load.s90b Bus1="67.2" Phases=1 Conn="wye" Model=5 kV=2.4 kW=40 kvar=20
new Load.s92c Bus1="67.3" Phases=1 Conn="wye" Model=1 kV=2.4 kW=40 kvar=20
new Load.s94a Bus1="67.1" Phases=1 Conn="wye" Model=1 kV=2.4 kW=40 kvar=20
new Load.s95b Bus1="67.2" Phases=1 Conn="wye" Model=1 kV=2.4 kW=20 kvar=10
new Load.s96b Bus1="67.2" Phases=1 Conn="wye" Model=1 kV=2.4 kW=20 kvar=10
new Load.s98a Bus1="97.1" Phases=1 Conn="wye" Model=1 kV=2.4 kW=40 kvar=20
new Load.s99b Bus1="97.2" Phases=1 Conn="wye" Model=1 kV=2.4 kW=40 kvar=20
new Load.s100c Bus1="97.3" Phases=1 Conn="wye" Model=2 kV=2.4 kW=40 kvar=20
new Load.s102c Bus1="197.3" Phases=1 Conn="wye" Model=1 kV=2.4 kW=20 kvar=10
new Load.s103c Bus1="197.3" Phases=1 Conn="wye" Model=1 kV=2.4 kW=40 kvar=20
new Load.s104c Bus1="197.3" Phases=1 Conn="wye" Model=1 kV=2.4 kW=40 kvar=20
new Load.s106b Bus1="197.2" Phases=1 Conn="wye" Model=1 kV=2.4 kW=40 kvar=20
new Load.s107b Bus1="197.2" Phases=1 Conn="wye" Model=1 kV=2.4 kW=40 kvar=20
new Load.s109a Bus1="109.1" Phases=1 Conn="wye" Model=1 kV=2.4 kW=40 kvar=20
new Load.s111a Bus1="109.1" Phases=1 Conn="wye" Model=1 kV=2.4 kW=20 kvar=10
new Load.s112a Bus1="109.1" Phases=1 Conn="wye" Model=5 kV=2.4 kW=20 kvar=10
new Load.s113a Bus1="109.1" Phases=1 Conn="wye" Model=2 kV=2.4 kW=40 kvar=20
new Load.s114a Bus1="109.1" Phases=1 Conn="wye" Model=1 kV=2.4 kW=20 kvar=10
