clear
new Circuit.Reduced basekv=230 phases=3 bus1=sourcebus frequency=60
redirect Source.dss
redirect Transformers.dss
redirect Branches.dss
redirect Shunts.dss
redirect Loads.dss
set controlmode=off
solve mode=snapshot
